# OpenSim document version 40000
MarkerSet:
  Marker R.A: ground (-0.1852228 0.02540596 -0.02411642)
  Marker R.Elbow: ground (-0.1545556 -0.2914935 -0.03708307)
  Marker R.Wrist: ground (-0.196543 -0.5473322 0.004207134)
  Marker R.Hand1: ground (-0.2139201 -0.6331496 0.0121612)
  Marker R.Hand2: ground (-0.1774173 -0.6549049 0.02168809)
  Marker R.Hand3: ground (-0.1425958 -0.6383465 0.03272498)
