# OpenSim document version 30000
ForceSet MoBL_ARMS_Actuators:
  # Actuators on the base segement are called Residual actuators
  # whose forces account for the errors in the model, its kinematic
  # that do not balance with experimental ground reaction forces
  TorqueActuator rz: min_control=-4 max_control=4 bodyA=thorax bodyB=ground torque_is_global=true axis=(0 0 1)
      optimal_force=25
  TorqueActuator rx: min_control=-4 max_control=4 bodyA=thorax bodyB=ground torque_is_global=true axis=(1 0 0)
      optimal_force=35
  TorqueActuator ry: min_control=-4 max_control=4 bodyA=thorax bodyB=ground torque_is_global=true axis=(0 1 0)
      optimal_force=15
